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/batch
! ANSYS input file written by Workbench version 2024 R2
! File used for geometry attach: C:\Users\Hrishi\Downloads\BRAKE ROTOR.step
/title,wbnew--Steady-State Thermal (A5)
/COM,/COM,     ANSYSMotion, 2024.2
/com,--- Data in consistent NMM units. See Solving Units in the help system for more information.
/units,MPA
/prep7
! Turn off shape checking because checks already performed inside WB mesher.
! See help system for more information.
SHPP,OFF,,NOWARN
etcon,set             ! allow ANSYS to choose best KEYOP's for 180x elements, resets any applicable keyopt to MAPDL defaults
/com,*********** Nodes for the whole assembly ***********
nblock,3,,7095
(1i9,3e20.9e3)
        1     7.620000000E+01     0.000000000E+00     4.800000000E+00
        2     7.554809844E+01     9.946095847E+00     4.800000000E+00
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-1
/com,*********** Elements for Body 1 'BRAKE ROTOR-FreeParts|Body1' ***********
et,1,291
eblock,19,solid,,2815
(19i9)
        1        1        1        1        0        0        0        0       10        0        1      795     1218      891     1113     5465     5773     5463     5464
     6401     5772
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-1
/com,*********** Send User Defined Coordinate System(s) ***********
csys,0
toffst,273.15,      ! Temperature offset from absolute zero
/com,*********** Send Materials ***********
MP,KXX,1,60,	! tonne mm s^-3 C^-1

!************************* Model Summary ********************
!BRAKE ROTOR-FreeParts|Body1,	Moksha,	matid,	1
!************************* End Model Summary ********************
/com,*********** Create "Heat Flux" ***********
et,2,152
eblock,10,,,1376
(15i9)
     5156        2        2        2        0       14      144      143      143     1333     2245      143     1332
     5157        2        2        2        0        7      355      354      354     1271     3483      354     1270
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-1
esel,s,type,,2
keyop,2,8,1         ! include heat flux
esel,all
fcum,add                   ! add nodal forces up (needed in case have loads on the same edge,vertex)
fcum                       ! reset default on fcum command since done sending WB F loads
/com,*********** Create "Convection" ***********
et,3,152
eblock,10,,,1472
(15i9)
     6532        3        3        3        0       14      144      143      143     1333     2245      143     1332
     6533        3        3        3        0        7      355      354      354     1271     3483      354     1270
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-1
esel,s,type,,3
keyop,3,8,2
keyop,3,13,0
esel,all
/com,***************** Define Uniform Initial temperature ***************
tunif,22.
fini
/com,****************************************************************************
/com,*************************    SOLUTION       ********************************
/com,****************************************************************************
/solu
antype,0                   ! static analysis
!eqsl,sparse               ! using sparse solver which is default so no eqsl command needed
cntr,print,1               ! print out contact info and also make no initial contact an error
cncheck,dmp		!	Enable program controlled contact splitting for distributed memory parallel run
rescontrol,,none                 ! Do not keep any restart files
dmpoption,emat,no             ! Don't combine emat file for DANSYS
dmpoption,esav,no             ! Don't combine esav file for DANSYS
/com,****************************************************
/com,******************* SOLVE FOR LS 1 OF 1 ****************
esel,s,type,,2
nsle
sf,all,hflux,1850.
nsel,all
esel,all
esel,s,type,,3
nsle
sf,all,conv,2.3,22.
nsel,all
esel,all
autots,on
nsub,1,10,1
time,1.
outres,erase
outres,all,none
outres,nsol,all
outres,rsol,all
outres,eangl,all
outres,veng,all
outres,fflux,all,
outres,cont,all,
esel,s,type,,3
cm,_elmisc,elem
esel,all
outres,misc,all,_elmisc
cnvtol,heat,,1.e-003,,1.e-003 ! Program Controlled. Set MINREF equivalent of 1e-6 Watts
! *********** WB SOLVE COMMAND ***********
! check interactive state
*get,ANSINTER_,active,,int
*if,ANSINTER_,ne,0,then
/eof
*endif
solve
/com *************** Write FE CONNECTORS *********
CEWRITE,file,ce,,INTE
/com,****************************************************
/com,*************** FINISHED SOLVE FOR LS 1 *************
/post1
fini
